d_ступ := 2990 mm
d := 3 mm
δ_1 := 5 mm
γ := 0.85
σ := 1750 MPa
τ_р := 157*Pa*0.8 = 125.6 Pa
k_z := 0.5
f_с := π*d^2/4 = 7.06858e-6 m^2
f_0 := 1.5*δ_1*d = 22.5 mm^2
solve block
    # guess values
    n := 500
    # constraints
    n == γ*δ_1*π*d_ступ/(k_z*n)*σ/(f_с*τ_р + k_z*f_0*σ)
    # solver
    n := find(n) = 84.2449
end solve block
t_1 := π*d_ступ/(0.5*n) = 223.001 mm
t_2 := 0.8*t_1 = 0.178401 m
360/42 = 8.57143
P := 30 kN
