D := 3 m
δ := 5 mm
P := -6 MN = -6000000 N
M := 50 MN*mm = 50000 N*m
τ_т := 20 MPa
R := D/2 = 1.5 m
S := π*D*δ = 0.0471239 m^2
d := D - 2*δ = 2.99 m
I_x := π/64*(D^4 - d^4) = 0.0527499 m^4
h := 50 mm
F := π*D*h = 0.471239 m^2
τ_P := |P|/F = 12.7324 MPa
τ_M_max := M/(2*R^2*h) = 0.222222 MPa
τ_M(φ) := τ_M_max*sin(φ)
2*integral(τ_M_max*sin(φ)*R, φ = 0 .. π/2)*h*R = 50000 N*m
τ_Σ := τ_P + τ_M_max = 12.9546 MPa
η := τ_т/τ_Σ = 1.54385
σ_P := P/(π*D*δ) = -127.324 MPa
σ_M := M/I_x*R = 1.4218 MPa
σ_Σ := σ_P - σ_M = -128.746 MPa
