D := 3 m
δ := 5 mm
P := -6 MN = -6000000 N
M := 50 MN*mm = 50000 N*m
σ_т := 1120 MPa
R := D/2 = 1.5 m
S := π*D*δ = 0.0471239 m^2
d := D - 2*δ = 2.99 m
I_x := π/64*(D^4 - d^4) = 0.0527499 m^4
σ_P := P/(π*D*δ) = -127.324 MPa
σ_M := M/I_x*R = 1.4218 MPa
σ_Σ := σ_P - σ_M = -128.746 MPa
η := σ_т/|σ_Σ| = 8.69932
