D := 3 m
δ := 5 mm
P := -6 MN = -6000000 N
M := 50 MN*mm = 50000 N*m
σ_т := 1400 MPa
R := D/2 = 1.5 m
S := π*D*δ = 0.0471239 m^2
d := D - 2*δ = 2.99 m
I_x := π/64*(D^4 - d^4) = 0.0527499 m^4
σ_P := P/(π*D*δ) = -127.324 MPa
σ_M := M/I_x*R = 1.4218 MPa
σ_Σ := σ_P - σ_M = -128.746 MPa
η := σ_т/|σ_Σ| = 10.8741
σ_в_ал := 315 MPa
d_1 := 3.242 mm
f_0 := π*d_1^2/4 = 8.25498 mm^2
P_max := |σ_Σ|*f_0 = 1062.79 N
h := 2 mm
b := 20 mm
W := b*h^2/6 = 13.3333 mm^3
a := 5 mm
σ_изг := P_max*a/(2*W) = 199.274 MPa
η := 0.8*σ_в_ал/σ_изг = 1.26459
